[X, Y, Z, W_3; 20, 0, 20, -167; -19.59, -4.14, -171.47, 0]
[X, Y, Z, W_3; 0, 0, 0, -187.55; 0, 0, -172.45, 0]
torad(x) := x*(π/180)
[X, Y, Z, W_3; 35, 0, 35, -155.31; -32.46, -13.86, -165.64, 0]
[X, Y, Z, W_3; 22.5, 0, 0, -187.35; -22.33, 2.81, -173.2, 0]
[X, Y, Z, W_3; 45, 0, 45, -148.87; -40.56, -21.44, -158.13, 0]
[X, Y, Z, W_3; 45, 0, 0, -185.92; -44.85, 4.18, -175.81, 0]
[X, Y, Z, W_3; 90, 0, 0, -180.1; -90, 0.1, -180, 0]
[R_X, R_Y, R_Z, X, Y, Z; 42, 17, 42, 45, 0, 45; 45, -58, 177, -40, -21, -158]
[X, Y, Z, W_3; 135, 0, 0, -174.2; -135, -4.1, -175.89, 0]
[R_X, R_Y, R_Z, X, Y, Z; 69.28, 69.28, 69.28, 90, 0, 90; 136.91, -144.96, 136.91, -90, 3.27, -90]
[X, Y, Z, W_3; 180, 0, 0, -172.4; -180, 0, -172.4, 0]
[R_X, R_Y, R_Z, X, Y, Z; 58.31, 140.78, 58.31, 135, 0, 135; 7, 143, 44.13, 142.24, 26.57, 165.01]
torad(-40.56) = -0.707906
