D := [0.317; -0.482; 0.817]
U := [0; 0; 1]
H := [D[0]; D[1]; 0]
W_0 := [-D[1]; D[0]; 0]
180 - 146.668 = 33.332
U_0 := W_0×D = [0.258989; -0.393794; -0.332813]
angle_roll := atan2(W_0*U, U_0*U/(|W_0|*|U_0|)) = -90 deg
angle_pitch := asin(D[2]) = 54.7856 deg
angle_heading := atan2(D[1], D[0]) = 146.668 deg
